10*s^3 + 8*s^2 + 6*s + 5 == 0
f(s) := 10*s^3 + 8*s^2 + 6*s + 5
10*s^3 + 8*s^2 + 6*s + 4.9 == 0 solve → [-0.807981898659; 0.0039909493297 + 0.778738275647i; 0.0039909493297 - 0.778738275647i] simplify → [-0.807981898659; 0.0039909493297 + 0.778738275647i; 0.0039909493297 - 0.778738275647i]
ω := 0, 0.01 .. 1
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k := 1
f(s) := k/(10*s^3 + 8*s^2 + 6*s + 4)
ω := 0, 0.001 .. 3
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