t := 0, 0.01 .. 200
X(s) := 1/s
100/((s + 1)*(2*s + 1)*(3*s + 1)*(4*s + 1)) expand → 100/(24*s^4 + 50*s^3 + 35*s^2 + 10*s + 1)
W(s) := 100/((s + 1)*(2*s + 1)*(3*s + 1)*(4*s + 1))
y(t) := W(s)*X(s) invlaplace, s → 50*e^(-t)/3 - 400*e^(-t/2) + 1350*e^(-t/3) - 3200*e^(-t/4)/3 + 100
lvl_1 := 10
lvl_2 := 63
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L := 4.28
T + L == 10.97
T := 10.97 - 4.28 = 6.69
H(s) := 100*exp(-L*s)/(s*(T*s + 1))
y_2(t) := H(s) invlaplace, s → -Φ(t - 4.28)*(100.0*e^(0.63976083707 - 0.149476831091*t) - 100.0)
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y_3(t) := 14.9477*t - 63.9761
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W(s) := 100/((s + 1)*(2*s + 1)*(3*s + 1)*(4*s + 1))
a := 63.9761
L = 4.28
W_PID(s, K_p, T_i, T_d) := K_p*(1 + 1/(T_i*s) + T_d*s)
W_ZN(s) := W_PID(s, 1.2/a, 2*L, 0.5*L) float, 6 → 0.04014*s + 0.00219124/s + 0.018757
W_opt(s) := (W_ZN(s)*W(s))/(1 + W_ZN(s)*W(s))
y_4(t) := W_opt(s)*X(s) invlaplace, s → 0.0105682127222*e^(-0.244909395658*t) - 0.341689308233*e^(-0.176964459053*t) - 1e-21*e^(-0.333333333333*t) - 0.118096398675*e^(-1.21693467943*t) - 0.550782505815*cos(0.351722250704*t)*e^(-0.222262399597*t) - 0.921216820425*sin(0.351722250704*t)*e^(-0.222262399597*t) + 1.0
W_ZN_COR(s) := 0.07*s + 0.00299124/s + 0.020
W_opt_cor(s) := (W_ZN_COR(s)*W(s))/(1 + W_ZN_COR(s)*W(s))
y_5(t) := W_opt_cor(s)*X(s) invlaplace, s → 1.0 - 0.145517203817*e^(-1.34211608648*t) - 0.429158612972*e^(-0.111545955862*t)*cos(0.12917205825*t) - 0.0340612255224*e^(-0.111545955862*t)*sin(0.12917205825*t) - 0.425324183212*e^(-0.259062667564*t)*cos(0.50169989496*t) - 0.695550766869*e^(-0.259062667564*t)*sin(0.50169989496*t) - 1e-21*e^(-0.333333333333*t)
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D(s) := (s + 0.8 + 1j*0.8)*(s + 0.8 - 1j*0.8)*(s + 10) simplify → 17.28*s + 11.6*s^2 + s^3 + 12.8
17.28*s + 11.6*s^2 + s^3 + 12.8 == s^3 + (17 + k_3)*s^2 + (80 + k_2)*s + (100 + k_1) solve, k_1, k_2, k_3 → [-5.4*s^2 - 62.72*s - 87.2, 0, 0]
s^3 + (17 + (-5.4))*s^2 + (80 + (-62.72))*s + (100 + (-87.2)) simplify → 17.28*s + 11.6*s^2 + s^3 + 12.8
W(s) := 1000/(17.28*s + 11.6*s^2 + s^3 + 12.8)
17.28*s + 11.6*s^2 + s^3 + 12.8 == 0 solve → [-10.0; -0.8 - 0.8i; -0.8 + 0.8i]
R := [-10.0; -0.8 - 0.8i; -0.8 + 0.8i]
y_6(t) := W(s)*X(s) invlaplace, s → 78.125 - 76.9523921201*cos(0.8*t)*e^(-0.8*t) - 91.6099906191*sin(0.8*t)*e^(-0.8*t) - 1.17260787992*e^(-10.0*t)
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0.72*s + 1.2*s^2 + s^3 + 0.216 == s^3 + (17 + k_3)*s^2 + (80 + k_2)*s + (100 + k_1) solve, k_1, k_2, k_3 → [-15.8*s^2 - 79.28*s - 99.784, 0, 0]
s^3 + (17 + (-15.8))*s^2 + (80 + (-79.28))*s + (100 + (-99.784)) simplify → 0.72*s + 1.2*s^2 + s^3 + 0.216
W(s) := 10/(0.72*s + 1.2*s^2 + s^3 + 0.216)
0.72*s + 1.2*s^2 + s^3 + 0.216 == 0 solve → [-0.6; -0.3 - 0.519615242271i; -0.3 + 0.519615242271i]
R := [-0.6; -0.3 - 0.519615242271i; -0.3 + 0.519615242271i]
y_6(t) := W(s)*X(s) invlaplace, s → 46.2962962963 - 53.4583582583*e^(-0.3*t)*sin(0.519615242271*t) - 46.2962962963*e^(-0.6*t)
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(s + 1.26)^3 expand → 4.7628*s + 3.78*s^2 + s^3 + 2.000376
4.7628*s + 3.78*s^2 + s^3 + 2.000376 == s^3 + (17 + k_3)*s^2 + (80 + k_2)*s + (100 + k_1) solve, k_1, k_2, k_3 → [-13.22*s^2 - 75.2372*s - 97.999624, 0, 0]
s^3 + (17 + (-13.22))*s^2 + (80 + (-75.2372))*s + (100 + (-97.999624)) simplify → 4.7628*s + 3.78*s^2 + s^3 + 2.000376
W(s) := 10/(4.7628*s + 3.78*s^2 + s^3 + 2.000376)
R := [-1.26; -1.26; -1.26]
y_6(t) := W(s)*X(s) invlaplace, s → 4.99906017669 - 3.96825396825*t^2*e^(-1.26*t) - 6.29881582263*t*e^(-1.26*t) - 4.99906017669*e^(-1.26*t)
4.7628*s + 3.78*s^2 + s^3 + 2.000376 == 0 solve → [-1.26; -1.26; -1.26]
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