t := 0, 0.01 .. 200
X(s) := 1/s
W(s) := 100/((s + 1)*(2*s + 1)*(3*s + 1)*(4*s + 1))
y(t) := W(s)*X(s) invlaplace, s → 50*e^(-t)/3 - 400*e^(-t/2) + 1350*e^(-t/3) - 3200*e^(-t/4)/3 + 100
lvl_1 := 10
lvl_2 := 63
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L := 4.28
T + L == 10.97
T := 10.97 - 4.28 = 6.69
H(s) := 100*exp(-L*s)/(s*(T*s + 1))
y_2(t) := H(s) invlaplace, s → -Φ(t - 4.28)*(100.0*e^(0.63976083707 - 0.149476831091*t) - 100.0)
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y_3(t) := 14.9477*t - 63.9761
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W(s) := 100/((s + 1)*(2*s + 1)*(3*s + 1)*(4*s + 1))
L = 4.28
a := 63.9761
W_PID(s, K_p, T_i, T_d) := K_p*(1 + 1/(T_i*s) + T_d*s)
W_ZN(s) := W_PID(s, 1.2/a, 2*L, 0.5*L) float, 6 → 0.04014*s + 0.00219124/s + 0.018757
W_opt(s) := W_ZN(s)*W(s)
y_4(t) := W_opt(s)*X(s) invlaplace, s → 0.219124*t - 1.615572*e^(-0.333333333333*t) - 0.392904*e^(-1.0*t) + 2.278192*e^(-0.5*t) + 0.045824*e^(-0.25*t) - 0.31554
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